Planform
#Mach
0

0 0 0

0.09764 0.11616 0.96

0.0 0.0 0.0

SURFACE
Main
16 1.0 35 1.0

COMPONENT
1

YDUPLICATE
0.0

SCALE
0.001 0.001 0.001

TRANSLATE
-0.2 0.0 -1.30

ANGLE
0

SECTION
17.1925 0 0 118.2946 0
AFILE
main.dat

SECTION
55.7026 125 0 96.6328 0
AFILE
main.dat

SECTION
74.6613 250 0 84.5576 0
AFILE
main.dat

SECTION
86.0964 375 0 68.4559 0
AFILE
main.dat

SECTION
99.846 500 0 25.4772 0
AFILE
main.dat
